OpenVSP model (file version 5), 4 components.
Geometry view with OpenVSP parameter names; values to 6 digits, angles in degrees, lengths in the model's unit.
Overall bounding box: X_Min=0 X_Len=136.753 Y_Min=-99.3426 Y_Len=198.685 Z_Min=-8.33505 Z_Len=44.9967

Fuselage "FuselageGeom"
  location (X Y Z) 0 0 0, rotation 0 0 0
  bounding box size 125 16.6701 16.6701
  Design: Length=125
  cross sections:
    n  XLocPercent  YLocPercent  ZLocPercent  shape
    0  0            0            0            super ellipse Super_Height=6.6 Super_M=6 Super_MaxWidthLoc=0 Super_N=6 Super_Width=6.6
    1  0.1864       0            0            super ellipse Super_Height=16.67 Super_M=6 Super_MaxWidthLoc=0 Super_N=6 Super_Width=16.67
    2  0.4664       0            0            super ellipse Super_Height=16.667 Super_M=6 Super_MaxWidthLoc=0 Super_N=6 Super_Width=16.667
    3  1            0            0.0012       super ellipse Super_Height=5 Super_M=6 Super_MaxWidthLoc=0 Super_N=6 Super_Width=5

Wing "TailPlane", child of "FuselageGeom"
  location (X Y Z) 110 0 0.652174, rotation 0 0 0
  symmetric about XZ
  bounding box size 26.7533 66.4111 1.4
  totals: TotalSpan=60.8113 TotalProjectedSpan=60.8113 TotalChord=20.5342 TotalArea=1248.71 TotalAR=2.96147
  root: chord 26.7533, twist 0, ellipse Ellipse_Height=1.4 Ellipse_Width=26.7533
  sections:
    n  Span     Root_Chord  Tip_Chord  Area     Sweep  Sweep_Location  Dihedral  Twist  Twist_Location  tip airfoil
    1  30.4057  26.7533     14.315     624.355  12     0               0         0      0.25            ellipse Ellipse_Height=1.4 Ellipse_Width=14.315

Wing "MainWing"
  location (X Y Z) 23.33 0 3.47826, rotation 0 0 0
  symmetric about XZ
  bounding box size 31.6794 198.685 16.7358
  totals: TotalSpan=200 TotalProjectedSpan=198.509 TotalChord=31.67 TotalArea=6334 TotalAR=6.22133
  root: chord 31.67, twist 0, airfoil file "WORTMANN FX 63-137 AIRFOIL"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 BaseThickChord=0.137237 ThickChord=0.137237
  sections:
    n  Span  Root_Chord  Tip_Chord  Area  Sweep  Sweep_Location  Dihedral  Twist  Twist_Location  tip airfoil
    1  100   31.67       31.67      3167  0      0               7         0      0.25            as above

Wing "VerticalStabilizer", child of "MainWing"
  location (X Y Z) 84.887 0 0, rotation 90 0 0
  bounding box size 37.0017 1.6 36.6617
  totals: TotalSpan=31.9859 TotalProjectedSpan=31.9859 TotalChord=26.6508 TotalArea=852.45 TotalAR=1.20018
  root: chord 37.0017, twist 0, ellipse Ellipse_Height=1.6 Ellipse_Width=37.0017
  sections:
    n  Span     Root_Chord  Tip_Chord  Area    Sweep    Sweep_Location  Dihedral  Twist  Twist_Location  tip airfoil
    1  31.9859  37.0017     16.3       852.45  32.8182  0               0         0      0.25            ellipse Ellipse_Height=1.6 Ellipse_Width=16.3

VSPAERO settings: Sref=6334 bref=200 cref=31.67 Xcg=0 Ycg=0 Zcg=0 AlphaStart=-20 AlphaEnd=20 AlphaNpts=20 BetaStart=0 BetaEnd=0 BetaNpts=1 MachStart=0 MachEnd=0 MachNpts=1 ReCref=60000 Vinf=100 Rho=0.002377
